// SBML level 2 version 1

model test11()

  // Compartments:
  compartment compartment = 1;

  // Species:
  species $X0 in compartment = 0;
  species $X1 in compartment = 0;
  species $X2 in compartment = 0;
  species $X3 in compartment = 0;
  species A in compartment = 0;
  species B in compartment = 0;
  species C in compartment = 0;
  species E in compartment = 0;
  species D in compartment = 0;
  species F in compartment = 0;

  // Reactions:
  J1: $X0 => A; 1;
  J2: A => B; 1;
  J3: A => C; 1;
  J4: B + E => D + D; 1;
  J5: $X1 => E; 1;
  J6: B => C + F; 1;
  J7: C => D; 1;
  J8: D => $X2; 1;
  J9: F => $X3; 1;
end
